A := [0, 1, 2; 1, 2, 3; 2, 3, 4]
B := [1, 2, 3; 2, 3, 4; 3, 4, 5]
C1 := A + B = [1, 3, 5; 3, 5, 7; 5, 7, 9]
A := [0, 1, 2; 1, 2, 3; 2, 3, 4]
B := [1, 2, 3; 2, 3, 4; 3, 4, 5]
C2 := A*B = [8, 11, 14; 14, 20, 26; 20, 29, 38]
A := [0, 1, 2; 1, 2, 3; 2, 3, 4]
V1 := [0; 1; 2]
D := A*V1 = [5; 8; 11]
V1 := [0; 1; 2]
transpose(V1) = [0, 1, 2]
V2 := [1; 2; 3]
q := transpose(V1)*V2 = 8
V1 := [0; 1; 2]
transpose(V1) = [0, 1, 2]
A := [0, 1, 2; 1, 2, 3; 2, 3, 4]
V2 := [1; 2; 3]
p := transpose(V1)*A*V2 = 54
V1 := [0; 1; 2]
V2 := [1; 2; 3]
VectorMult := V1×V2 = [-1; 2; -1]
V1 := [0; 1; 2]
V1 := [0; 1; 2]
V2 := [1; 2; 3]
V2 := [1; 2; 3]
ScalarMult := V1*V2 = 8
V2 := [1; 2; 3]
V2 := [1; 2; 3]
V1 := [0; 1; 2]
V1 := [0; 1; 2]
|V1| → sqrt(5) = 2.23607
|V2| → sqrt(14) = 3.74166
V1 := [0; 1; 2]
V2 := [1; 2; 3]
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8/(sqrt(5)*sqrt(14)) = 0.956183
V1*V2 = 8
|V1| → sqrt(5) = 2.23607
|V2| → sqrt(14) = 3.74166
newVector := [11; 30; 10]
x := newVector[0]*cos(newVector[1])*sin(newVector[2]) = -0.923076
newVector[0] = 11
newVector[1] = 30
y := newVector[0]*sin(newVector[1])*sin(newVector[2]) = 5.91261
newVector[2] = 10
z := newVector[0]*cos(newVector[2]) = -9.22979
