Xf := -2
Yf := 0
Xa := -2
Ya := -4
Xe := 2
Ye := -4
Xh := 2
Yh := 0
Xb := -3
Yb := 0
Xc := 0
Yc := 4
Xd := 3
Yd := 0
X1 := [Xf; Xa; Xe; Xh; Xb; Xc; Xd; Xb]
y1 := [Yf; Ya; Ye; Yh; Yb; Yc; Yd; Yb]
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Xlw := 100
Ylw := 200
Xhw := 400
Yhw := 500
Zx := [Xf; Xa; Xe; Xh; Xb; Xc; Xd; Xb]
Zy := [Yf; Ya; Ye; Yh; Yb; Yc; Yd; Yb]
XL := min(Zx) = -3
YH := max(Zy) = 4
XH := max(Zx) = 3
YL := min(Zy) = -4
ΔXW := Xhw - Xlw = 300
ΔX := XH - XL = 6
ΔYW := Yhw - Ylw = 300
ΔY := YH - YL = 8
Kx := ΔXW/ΔX = 50
Ky := ΔYW/ΔY = 37.5
Tsw := [Kx, 0, Xlw - Kx*XL; 0, -Ky, Yhw + Ky*YL; 0, 0, 1]
[Xaw; Yaw; q] := Tsw*[Xa; Ya; 1] = [150; 500; 1]
[Xbw; Ybw; q] := Tsw*[Xb; Yb; 1] = [100; 350; 1]
[Xcw; Ycw; q] := Tsw*[Xc; Yc; 1] = [250; 200; 1]
[Xdw; Ydw; q] := Tsw*[Xd; Yd; 1] = [400; 350; 1]
[Xew; Yew; q] := Tsw*[Xe; Ye; 1] = [350; 500; 1]
[Xfw; Yfw; q] := Tsw*[Xf; Yf; 1] = [150; 350; 1]
[XHW; YHW; q] := Tsw*[Xh; Yh; 1] = [350; 350; 1]
Z2x := [Xfw; Xaw; Xew; XHW; Xbw; Xcw; Xdw; Xbw]
Z2y := -[Yfw; Yaw; Yew; YHW; Ybw; Ycw; Ydw; Ybw]
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