f(x) := sin(π*x)*sqrt(|x|)
x1 := -6
x2 := 6
Δx := 0.1
Xlw := 100
Ylw := 200
Xhw := 800
Yhw := 900
N := round((x2 - x1)/Δx) = 120
i := 0 .. N
X[i] := x1 + i*Δx
Y[i] := f(X[i])
Z[i] := 1
Xl := min(X) = -6
Yh := max(Y) = 2.34521
Xh := max(X) = 6
Yl := min(Y) = -2.34521
Ms := stack(transpose(X), transpose(Y), transpose(Z)) = [
    -6, -5.9, -5.8, -5.7, -5.6, -5.5, -5.4, -5.3, -5.2, -5.1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;
    0, 0.7506, 1.41557, 1.9315, 2.25061, 2.34521, 2.21006, 1.8625, 1.34036, 0.697859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;
    1, 1, 1, 1, 1, 1, 1, 1, 1, 1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]
ΔXw := Xhw - Xlw = 700
ΔX := Xh - Xl = 12
ΔYw := Yhw - Ylw = 700
ΔY := Yh - Yl = 4.69042
Kx := ΔXw/ΔX = 58.3333
Ky := ΔYw/ΔY = 149.241
Tsw := [Kx, 0, Xlw - Kx*Xl; 0, -Ky, Yhw + Ky*Yl; 0, 0, 1]
Mw := Tsw*Ms
Xw := transpose(Mw)[:, 0]
Yw := transpose(Mw)[:, 1]
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