Xa := 5
Ya := 2
Xb := 10
Yb := 12
Xc := 13
Yc := 8
Xlw := 200
Ylw := 300
Xhw := 800
Yhw := 700
Zx := transpose([Xa, Xb, Xc]) = [5; 10; 13]
Zy := transpose([Ya, Yb, Yc]) = [2; 12; 8]
Xl := min(Zx) = 5
Yh := max(Zy) = 12
Xh := max(Zx) = 13
Yl := min(Zy) = 2
ΔXw := Xhw - Xlw = 600
Δx := Xh - Xl = 8
ΔYw := Yhw - Ylw = 400
Δy := Yh - Yl = 10
Kx := ΔXw/Δx = 75
Ky := ΔYw/Δy = 40
Tsw := [Kx, 0, Xlw - Kx*Xl; 0, -Ky, Yhw + Ky*Yl; 0, 0, 1]
[Xaw; Yaw; q] := Tsw*[Xa; Ya; 1] = [200; 700; 1]
[Xbw; Ybw; q] := Tsw*[Xb; Yb; 1] = [575; 300; 1]
[Xcw; Ycw; q] := Tsw*[Xc; Yc; 1] = [800; 460; 1]
Z2x := [Xaw; Xbw; Xcw; Xaw]
Z2y := [Yaw; Ybw; Ycw; Yaw]
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