# Задаем координаты вершин пирамиды и положения камеры:
PIR := [0, 0, 3, 0, 0, 1; 3, 0, 0, 1, 0, 0; 0, 0, 0, 3, 3, 3; 1, 1, 1, 1, 1, 1]
PV := [10; 315; 45]
# Получаем сферические координаты точки наблюдения:
r_v := PV[0] = 10
ϕ_v := PV[1]*π/180 = 5.49779
θ_v := PV[2]*π/180 = 0.785398
# Задаем область отображения графика в окне Windows
x_LW := 200
y_LW := 100  # – левый верхний угол области отображения
x_HW := 700
y_HW := 500  # – правый нижний угол области отображения
# Формируем матрицу пересчета мировых координат в видовые
K_view := [
    -sin(ϕ_v), cos(ϕ_v), 0, 0;
    -cos(θ_v)*cos(ϕ_v), -cos(θ_v)*sin(ϕ_v), sin(θ_v), 0;
    -sin(θ_v)*cos(ϕ_v), -sin(θ_v)*sin(ϕ_v), -cos(θ_v), r_v;
    0, 0, 0, 1
]
# Вычисляем координаты вершин пирамиды в видовой системе координат (ВСК)
PIR_V := K_view*PIR
# Определяем координаты проекции вершин пирамиды на картинную плоскость
P_XY := stack(transpose(transpose(PIR_V)[:, 0]), transpose(transpose(PIR_V)[:, 1]), transpose(transpose(PIR_V)[:, 3]))
P_XY = [
    2.12132, 0, 2.12132, 0.707107, 0, 0.707107;
    1.5, 0, -1.5, 2.62132, 2.12132, 1.62132;
    1, 1, 1, 1, 1, 1
]
# Определяем габаритную область проекции пирамиды на плоскость XY ВСК – картинную плоскость
x_L := min(transpose(P_XY)[:, 0])
y_H := max(transpose(P_XY)[:, 1])
# – левый верхний угол
x_L = 0
y_H = 2.62132
x_H := max(transpose(P_XY)[:, 0])
y_L := min(transpose(P_XY)[:, 1])
# – правый нижний угол
x_H = 2.12132
y_L = -1.5
# Вычисляем параметры, необходимые для формирования матрицы пересчета координат из плоскости XY ВСК в ОК
Δx_W := x_HW - x_LW
Δx_W = 500
Δx := x_H - x_L
Δx = 2.12132
Δy_W := y_HW - y_LW
Δy_W = 400
Δy := y_H - y_L
Δy = 4.12132
k_x := Δx_W/Δx
k_x = 235.702
k_y := Δy_W/Δy
k_y = 97.0563
T_SW := [k_x, 0, x_LW - k_x*x_L; 0, -k_y, y_HW + k_y*y_L; 0, 0, 1] = [235.702, 0, 200; 0, -97.0563, 354.416; 0, 0, 1]  # – матрица пересчета из ВСК в ОК
# Вычисляем оконные координаты вершин пирамиды
M_W := T_SW*P_XY
[x_a, x_b, x_c, x_d, x_e, x_f; y_a, y_b, y_c, y_d, y_e, y_f; q, q, q, q, q, q] := vectorize(round(M_W)) = [700, 200, 700, 367, 200, 367; 209, 354, 500, 100, 149, 197; 1, 1, 1, 1, 1, 1]
R_C := [r_v*sin(θ_v)*cos(ϕ_v); r_v*sin(θ_v)*sin(ϕ_v); r_v*cos(θ_v)] = [5; -5; 7.07107]
A := [3; 0; 0]
D := [1; 0; 3]
C := [0; 3; 0]
AC := C - A = [-3; 3; 0]
AD := D - A = [-2; 0; 3]
N_AB1C := AC×AD = [9; 9; 6]
N_ABB1 := [0; -1; 0]
N_ABC := [0; 0; -1]
N_CBB1 := [-1; 0; 0]
N_A1B1C1 := [0; 0; 1]
q1 := R_C*N_AB1C = 42.4264
s1 := if(q1 ≥ 0, "Грань AB1C видима", "Грань AB1C невидима") = "Грань AB1C видима"
q1 := R_C*N_ABB1 = 5
s1 := if(q1 ≥ 0, "Грань ABB1 видима", "Грань ABB1 невидима") = "Грань ABB1 видима"
q1 := R_C*N_ABC = -7.07107
s1 := if(q1 ≥ 0, "Грань ABC видима", "Грань ABC невидима") = "Грань ABC невидима"
q1 := R_C*N_CBB1 = -5
s1 := if(q1 ≥ 0, "Грань CBB1 видима", "Грань CBB1 невидима") = "Грань CBB1 невидима"
q1 := R_C*N_A1B1C1 = 7.07107
s1 := if(q1 ≥ 0, "Грань A1B1C1 видима", "Грань A1B1C1 невидима") = "Грань A1B1C1 видима"
# Формируем массивы координат X и Y для рисования пирамиды
X := transpose([x_e, x_b, x_c, x_f, x_e, x_d, x_f, x_c, x_a, x_d])
Y := -transpose([y_e, y_b, y_c, y_f, y_e, y_d, y_f, y_c, y_a, y_d])
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